// COMSOL Multiphysics 5.2.0.166 model "BH_interpolation_test.mph"
// Small-Signal Analysis of an Inductor
// modeldescr_acdc/small_signal_analysis_of_inductor
// A magnetic material in the core of an inductor influences the inductance. If the magnetic material is nonlinear the inductance depends on the current through the inductor. This example analyzes the small-signal behavior of an inductance with a nonlinear core, and investigates how the small-signal inductance depends on the DC current.
// Outline of the model tree

Parameters
  l = 2[cm]  // Length
  rad = 5[mm]  // Radius
  H0 = 5000 [Oe]
  t0 = 1  // 'time' parameter
  deltaH = 1[A/m]  // delta H for numerical differentiation

Probes
  dom1: Domain "Domain Probe 1" on all domains | expr = mfnc.Hz; unit = A/m; table = tbl3
  dom2: Domain "Domain Probe 2" on all domains | expr = mfnc.Bz-mfnc.Hz*mu0_const; unit = T; table = tbl3
  dom3: Domain "Domain Probe 3" on all domains | expr = mfnc.Bz; unit = T; table = tbl3

Geometry
  geom1 "Geometry 1" (2D axisymmetric, length unit m)
    r1: Rectangle | pos = {0, -l/2}; size = {rad, l}
    fin: Finalize "Form Union"

Materials
  mat2: Common "Soft Iron (without losses)" on domains 1
    def "Basic"
      electricconductivity = 0[S/m]
      relpermittivity = 1
    BHCurve
      normB = BH(normH[m/A])[T]
      normH = sqrt(H1^2+H2^2+H3^2)
      BH: Interpolation
        table = {{0, 0}, {663.146, 1}, {1067.5, 1.1}, {1705.23, 1.2}, {2463.11, 1.3}, {3841.67, 1.4}, {5425.74, 1.5}, {7957.75, 1.6}, {12298.3, 1.7}, {20462.8, 1.8}, {32169.6, 1.9}, {61213.4, 2.0}, {111408, 2.1}, {175070, 2.2}, {261469, 2.3}, {318310, 2.4}}
        extrap = linear
    HBCurve
      normH = HB(normB[1/T])[A/m]
      normB = sqrt(B1^2+B2^2+B3^2)
      HB: Interpolation
        table = {{0, 0}, {1, 663.146}, {1.1, 1067.5}, {1.2, 1705.23}, {1.3, 2463.11}, {1.4, 3841.67}, {1.5, 5425.74}, {1.6, 7957.75}, {1.7, 12298.3}, {1.8, 20462.8}, {1.9, 32169.6}, {2.0, 61213.4}, {2.1, 111408}, {2.2, 175070}, {2.3, 261469}, {2.4, 318310}}
        extrap = linear
    EffectiveBHCurve
      normBeff = BHeff(normHeff[m/A])[T]
      normHeff = sqrt(realdot(H1,H1)+realdot(H2,H2)+realdot(H3,H3))
      BHeff: Interpolation
        table = 
          {0, 0}
          {663.146, 0.515319470797}
          {1067.5, 0.829536082667}
          {1705.23, 1.32510521241}
          {2463.11, 1.91404086237}
          {3841.67, 2.57920968045}
          {5425.74, 2.83339604721}
          {7957.75, 3.12897627654}
          {12298.3, 3.44497898385}
          {20462.8, 3.77984140944}
          {32169.6, 4.05829078646}
          {61213.4, 4.42072473626}
          {111408, 4.72173321512}
          {175070, 4.94154751401}
          {261469, 5.14442322648}
          {318310, 5.25316413139}
        extrap = linear
    EffectiveHBCurve
      normHeff = HBeff(normBeff[1/T])[A/m]
      normBeff = sqrt(realdot(B1,B1)+realdot(B2,B2)+realdot(B3,B3))
      HBeff: Interpolation
        table = 
          {0, 0}
          {0.515319470797, 663.146}
          {0.829536082667, 1067.5}
          {1.32510521241, 1705.23}
          {1.91404086237, 2463.11}
          {2.57920968045, 3841.67}
          {2.83339604721, 5425.74}
          {3.12897627654, 7957.75}
          {3.44497898385, 12298.3}
          {3.77984140944, 20462.8}
          {4.05829078646, 32169.6}
          {4.42072473626, 61213.4}
          {4.72173321512, 111408}
          {4.94154751401, 175070}
          {5.14442322648, 261469}
          {5.25316413139, 318310}
        extrap = linear
  extmat3: External "External Material - C++"

Physics
  mfnc: MagnetostaticsNoCurrents "Magnetic Fields, No Currents" on all domains
    dependent variable Vm
    mfc1: MagneticFluxConservation (default) | material = none
    axi1: AxialSymmetry (default)
    mi1: MagneticInsulation (default)
    init1: init "Initial Values 1" (default)
    msp2: MagneticScalarPotential on boundaries 2, 3 | Vm0 = -H0*z
    mfc3: MagneticFluxConservation "Nonlinear Mat - Internal" (disabled) on all domains | ConstitutiveRelationH = BHCurve
    mfc4: MagneticFluxConservation "Nonlinear Mat - External C++" on all domains
      ConstitutiveRelationH = BHCurve
      normB_mat = External
      material = extmat3

Mesh
  mesh1 "Mesh 1" (physics-controlled)
    size: MeshSizeDefault | hauto = 4

Studies
  std1 "Study 1"
    stat: Stationary | useparam = on; pname = H0; plistarr = 0,10^{range(0,6/99,6)}

Solver configurations
  sol1 "Solution 1" (study std1)
    v1: Variables "Dependent Variables 1"
    s1: Stationary "Stationary Solver 1"
      dDef: Direct
      p1: Parametric
      fc1: FullyCoupled | linsolver = dDef

Datasets
  dset1: Solution | solution = sol1
  rev1: Revolve2D "Revolution 2D 1" | data = dset1; genpoints = {{0, 0}, {0, 1}}
  dset2: Solution "Probe Solution 2" | solution = sol1
  avh1: Average "Domain Probe 1" on domains 1 | data = dset2
  avh2: Average "Domain Probe 2" on domains 1 | data = dset2
  avh3: Average "Domain Probe 3" on domains 1 | data = dset2
  BH_ds1: Grid1D
    source = function
    function = BH
    functionlist = material/mat2/BHCurve
    par1 = t
    parmin1 = 0
    parmax1 = 318310
  ptds1: CutPoint1D
    data = BH_ds1
    pointx = 0.0 663.146 1067.5 1705.23 2463.11 3841.67 5425.74 7957.75 12298.3 20462.8 32169.6 61213.4 111408.0 175070.0 261469.0 318310.0
  BH_ds2: Grid1D
    source = function
    function = BH
    functionlist = material/mat2/BHCurve
    par1 = t
    parmin1 = -31831
    parmax1 = 0
  BH_ds3: Grid1D
    source = function
    function = BH
    functionlist = material/mat2/BHCurve
    par1 = t
    parmin1 = 318310
    parmax1 = 350141

Derived values
  pev1: EvalPoint "Domain Probe 1" | data = avh1; table = tbl3; expr = mfnc.Hz
  pev2: EvalPoint "Domain Probe 2" | data = avh2; table = tbl3; expr = mfnc.Bz-mfnc.Hz*mu0_const
  pev3: EvalPoint "Domain Probe 3" | data = avh3; table = tbl3; expr = mfnc.Bz

Tables
  tbl3: Table "Probe Table 3"
    H0 | Magnetic field, z component (A/m), Domain Probe 1 {avh1} | mfnc.Bz-mfnc.Hz*mu0_const (T), Domain Probe 2 {avh2} | Magnetic flux density, z component (T), Domain Probe 3 {avh3}
    0 | 0 | 0 | 0
    1 | 1 | 0.00150671 | 0.00150796
    1.14976 | 1.14976 | 0.00173235 | 0.00173379
    1.32194 | 1.32194 | 0.00199178 | 0.00199344
    1.51991 | 1.51991 | 0.00229006 | 0.00229197
    1.74753 | 1.74753 | 0.00263301 | 0.00263521
    2.00923 | 2.00923 | 0.00302733 | 0.00302985
    2.31013 | 2.31013 | 0.00348069 | 0.00348359
    2.65609 | 2.65609 | 0.00400195 | 0.00400528
    3.05386 | 3.05386 | 0.00460127 | 0.0046051
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
Plots
  pg8: PlotGroup1D "Probe Plot Group 8"
    tblp1: Table "Probe Table Graph 1" | table = tbl3; xaxisdata = 2; plotcolumns = {3, 4}
  pg9: PlotGroup2D "Magnetic Flux Density Norm (mfnc)" | animating = off; data = dset1
    surf1: Surface | expr = mfnc.normB; unit = T
  pg10: PlotGroup2D "stress" | animating = off; data = dset1
    surf1: Surface | expr = mfnc.normB; unit = T

Exports
  anim1: Animation | target = player; onlydisplay = off; options = off; axes = on