// COMSOL Multiphysics 5.2.0.166 model "nonlinear_elastic.mph"
// Compare linear elastic material
// Compare the built-in Linear Elastic material with a C-coded linear elastic material
// Outline of the model tree

Parameters
  d0 = 0[m]  // Prescribed Initial Displacement
  dmax = 5[um]  // Prescribed Max Displacement
  E0 = 200e9[Pa]  // Young's Modulus
  nu0 = 0.3  // Poisson's Ratio
  rho0 = 8e3[kg/m^3]  // Prescribed Displacement
  E1 = -3.25e14[Pa]  // Youngs Modulus (first nonlinear term - softening)
  E2 = 1e15[Pa]  // Youngs Modulus (first nonlinear term - stiffening)

Geometry
  geom1 "Geometry 1" (2D axisymmetric, length unit m)
    r1: Rectangle | size = {1[cm], 5[cm]}
    fin: Finalize "Form Union"

Materials
  extmat1: External "External Material 1"
    def "Basic"
      density = rho0
    comcomsolgeneralStressStrain "General stress-strain relation"
      par = {E0, E2, nu0}

Physics
  solid: SolidMechanics "Solid Mechanics, built-in Linear Elastic material" on all domains
    dependent variable u = {u, v, w}
    StructuralTransientBehavior.StructuralTransientBehavior = Quasistatic
    lemm1: LinearElasticModel "Linear Elastic Material 1" (default)
      E_mat = userdef
      E = E0
      nu_mat = userdef
      nu = nu0
      rho_mat = userdef
      rho = rho0
    axi1: AxialSymmetrySolid "Axial Symmetry 1" (default)
    free1: Free (default)
    init1: init "Initial Values 1" (default)
    sym1: SymmetrySolid "Symmetry 1" on boundaries 2
    disp1: Displacement1 "Prescribed Displacement 1" on boundaries 3 | U0 = {0, 0, d0}
  solid2: SolidMechanics "Solid Mechanics 2, C-coded Linear Elastic material" on all domains
    dependent variable u2 = {u2, v2, w2}
    lemm1: LinearElasticModel "Linear Elastic Material 1" (default)
    axi1: AxialSymmetrySolid "Axial Symmetry 1" (default)
    free1: Free (default)
    init1: init "Initial Values 1" (default)
    sym1: SymmetrySolid "Symmetry 1" on boundaries 2 | constraintType = symmetricConstraint; constraintMethod = elemental
    disp1: Displacement1 "Prescribed Displacement 1" on boundaries 3 | Direction = {0, 0, 1}; U0 = {0, 0, d0}
    essr1: ExternalStressStrainRelation on domains 1

Mesh
  mesh1 "Mesh 1"
    size: MeshSizeDefault | hauto = 3
    map1: Map "Mapped 1" on remaining entities

Studies
  std1 "Study 1"
    stat: Stationary | useparam = on; pname = d0; plistarr = range(0,dmax/20,dmax); punit = m

Solver configurations
  sol1 "Solution 1" (study std1)
    v1: Variables "Dependent Variables 1"
    s1: Stationary "Stationary Solver 1"
      dDef: Direct
      p1: Parametric
      fc1: FullyCoupled | linsolver = dDef; termonres = auto; reserrfact = 1000

Datasets
  dset1: Solution | solution = sol1
  rev1: Revolve2D "Revolution 2D 1" | data = dset1; genpoints = {{0, 0}, {0, 1}}; startangle = -90; revangle = 225

Plots
  pg1: PlotGroup2D "Displacement" | data = dset1
    surf1: Surface | expr = solid.disp
      def: Deform "Deformation" | expr = {u, w}
    surf2: Surface | expr = solid2.disp
      def: Deform "Deformation" | expr = {u +2[cm], w}
    ann1: Annotation | text = Built-in Linear Elastic Material
    ann2: Annotation | text = C-coded Linear Elastic Material
  pg2: PlotGroup3D "Stress, 3D (solid)" | data = rev1
    surf1: Surface | expr = solid.mises
      def: Deform "Deformation" | expr = {cos(rev1phi)*u, sin(rev1phi)*u, w}; descr = Displacement field (Material)
    surf2: Surface | expr = solid2.mises; wireframe = off
      def: Deform "Deformation" | expr = {cos(rev1phi)*u+3[cm], sin(rev1phi)*u, w}; descr = Displacement field (Material)
    ann1: Annotation | text = Built-in Linear Elastic Material
    ann2: Annotation | text = C-coded Linear Elastic Material
  pg3: PlotGroup1D "1D Plot Group 3" | data = dset1
    ptgr1: PointGraph on points 2
      expr = solid.mises
      xdata = solution
      xdataexpr = w/5[cm]
      legends = Built-in Linear Elastic Material
    ptgr2: PointGraph on points 2
      expr = solid2.mises
      xdata = solution
      xdataexpr = w/5[cm]
      legends = C++ NonLinear Elastic Material