// COMSOL Multiphysics 5.2.0.166 model "Mazars_damage.mph"
// Mazars's model for concrete damage
// This example benchmarks Mazars' damage model for concrete. The uniaxial curve is in excellent agreement with the results presented in the book "Mechanical Behavior of Concrete", Torrenti, Pijaudier-Cabot and Reynouard eds. Wiley 2010.
// Outline of the model tree

Parameters
  para = 0[m]  // Parameter to control axial displacement
  E0 = 3e10  // Undamaged Young's module
  nu0 = 0.2  // Undamaged Poisson's ratio
  kappa0 = 1e-4  // Mazars' parameter: initial damage threshold
  At = 1  // Mazars' parameter At
  Bt = 1.5e4  // Mazars' parameter Bt
  Ac = 1.2  // Mazars' parameter Ac
  Bc = 1.5e3  // Mazars' parameter Bc

Geometry
  geom1 "Geometry 1" (2D axisymmetric, length unit m)
    r1: Rectangle | size = {3[cm], 10[cm]}
    fin: Finalize "Form Union"

Materials
  extmat1: External "External Material 1"
    def "Basic"
      density = 2e3
    comcomsolgeneralStressStrain "General stress-strain relation"
      par = {E0, nu0, comp1.solid.stchelp1, comp1.solid.stchelp2, comp1.solid.stchelp3, kappa0, At, Bt, Ac, Bc}

Physics
  solid: SolidMechanics on all domains
    dependent variable u = {u, v, w}
    ShapeProperty.order_displacement = 1
    lemm1: LinearElasticModel "Linear Elastic Material 1" (default) | E_mat = userdef; E = E0; nu_mat = userdef; nu = nu0
    axi1: AxialSymmetrySolid "Axial Symmetry 1" (default)
    free1: Free (default)
    init1: init "Initial Values 1" (default)
    sym1: SymmetrySolid "Symmetry 1" on boundaries 2
    disp1: Displacement1 "Prescribed Displacement 1" on boundaries 3 | Direction = {0, 0, 1}; U0 = {0, 0, para}
    essr1: ExternalStressStrainRelation on domains 1

Mesh
  mesh1 "Mesh 1"
    size: MeshSizeDefault | hauto = 9
    map1: Map "Mapped 1" on remaining entities
      dis1: Distribution on boundaries 1, 3 | numelem = 1

Studies
  std1 "Study 1"
    stat: Stationary "Stationary, tension" | useparam = on; pname = para; plistarr = range(0,1e-6,3e-5)
    stat1: Stationary "Stationary 1, compression"
      useinitsol = on
      useparam = on
      pname = para
      plistarr = range(0,-1e-5,-8e-4)
      pcontinuationmode = manual
      pcontinuation = para

Solver configurations
  sol1 "Solution 1" (study std1)
    v1: Variables "Dependent Variables 1"
    s1: Stationary "Stationary Solver 1"
      dDef: Direct
      p1: Parametric | pname = para; plistarr = range(0,1e-6,3e-5)
      fc1: FullyCoupled
    su1: StoreSolution
    v2: Variables "Dependent Variables 2" | notsolmethod = sol
    s2: Stationary "Stationary Solver 2"
      dDef: Direct
      p1: Parametric | pname = para; plistarr = range(0,-1e-5,-8e-4); pcontinuationmode = manual; pcontinuation = para
      fc1: FullyCoupled
  sol2 "Solution Store 1" (study std1)

Datasets
  dset1: Solution "Compressive" | solution = sol1
  rev1: Revolve2D "Revolution 2D 1" | data = dset1; genpoints = {{0, 0}, {0, 1}}; startangle = -90; revangle = 225
  dset2: Solution "Tensile" | solution = sol2

Plots
  pg1: PlotGroup2D "Stress (solid)" | data = dset1
    surf1: Surface | expr = solid.mises; unit = N/m^2
      def: Deform "Deformation" | expr = {u, w}
  pg2: PlotGroup3D "Stress, 3D (solid)" | data = rev1
    surf1: Surface | expr = solid.mises; unit = N/m^2
      def: Deform "Deformation" | expr = {cos(rev1phi)*u, sin(rev1phi)*u, w}
  pg3: PlotGroup1D "1D Plot Group 3" | data = dset1; xlabel = Axial strain; ylabel = Axial stress (MPa)
    ptgr1: PointGraph on points 4 | expr = solid.sz; unit = MPa; xdata = expr; xdataexpr = solid.stchelp3-1
    ptgr2: PointGraph on points 4 | data = dset2; expr = solid.sz; unit = MPa; xdata = expr; xdataexpr = solid.stchelp1-1